*Heading
** Job name: teeter Model name: qiaoqiaoban-2python
** Generated by: Abaqus/CAE 2020
*Preprint, echo=NO, model=NO, history=NO, contact=NO
**
** PARTS
**
*Part, name=Part-1
*Node
      1,           0.,           0.,           0.
      2,        43.75,           0.,           0.
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*Element, type=B31
1,  1, 42
2, 42, 43
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*Nset, nset=Set-1
  1,  2, 42, 43, 44
*Elset, elset=Set-1, generate
 1,  4,  1
*Nset, nset=Set-2
  2,  3, 45, 46, 47
*Elset, elset=Set-2, generate
 5,  8,  1
*Nset, nset=Set-3
  3,  4, 48, 49, 50
*Elset, elset=Set-3, generate
  9,  12,   1
*Nset, nset=Set-4
  4,  5, 51, 52, 53
*Elset, elset=Set-4, generate
 13,  16,   1
*Nset, nset=Set-5
  5,  6, 54, 55, 56
*Elset, elset=Set-5, generate
 17,  20,   1
*Nset, nset=Set-6
  6,  7, 57, 58, 59
*Elset, elset=Set-6, generate
 21,  24,   1
*Nset, nset=Set-7
  7,  8, 60, 61, 62
*Elset, elset=Set-7, generate
 25,  28,   1
*Nset, nset=Set-8
  8,  9, 63, 64, 65
*Elset, elset=Set-8, generate
 29,  32,   1
*Nset, nset=Set-9
  9, 10, 66, 67, 68
*Elset, elset=Set-9, generate
 33,  36,   1
*Nset, nset=Set-10
 10, 11, 69, 70, 71
*Elset, elset=Set-10, generate
 37,  40,   1
*Nset, nset=Set-11
 11, 12, 72, 73, 74
*Elset, elset=Set-11, generate
 41,  44,   1
*Nset, nset=Set-12
 12, 13, 75, 76, 77
*Elset, elset=Set-12, generate
 45,  48,   1
*Nset, nset=Set-13
 13, 14, 78, 79, 80
*Elset, elset=Set-13, generate
 49,  52,   1
*Nset, nset=Set-14
 14, 15, 81, 82, 83
*Elset, elset=Set-14, generate
 53,  56,   1
*Nset, nset=Set-15
 15, 16, 84, 85, 86
*Elset, elset=Set-15, generate
 57,  60,   1
*Nset, nset=Set-16
 16, 17, 87, 88, 89
*Elset, elset=Set-16, generate
 61,  64,   1
*Nset, nset=Set-17
 17, 18, 90, 91, 92
*Elset, elset=Set-17, generate
 65,  68,   1
*Nset, nset=Set-18
 18, 19, 93, 94, 95
*Elset, elset=Set-18, generate
 69,  72,   1
*Nset, nset=Set-19
 19, 20, 96, 97, 98
*Elset, elset=Set-19, generate
 73,  76,   1
*Nset, nset=Set-20
  20,  21,  99, 100, 101
*Elset, elset=Set-20, generate
 77,  80,   1
*Nset, nset=Set-21
  21,  22, 102, 103, 104
*Elset, elset=Set-21, generate
 81,  84,   1
*Nset, nset=Set-22
  22,  23, 105, 106, 107
*Elset, elset=Set-22, generate
 85,  88,   1
*Nset, nset=Set-23
  23,  24, 108, 109, 110
*Elset, elset=Set-23, generate
 89,  92,   1
*Nset, nset=Set-24
  24,  25, 111, 112, 113
*Elset, elset=Set-24, generate
 93,  96,   1
*Nset, nset=Set-25
  25,  26, 114, 115, 116
*Elset, elset=Set-25, generate
  97,  100,    1
*Nset, nset=Set-26
  26,  27, 117, 118, 119
*Elset, elset=Set-26, generate
 101,  104,    1
*Nset, nset=Set-27
  27,  28, 120, 121, 122
*Elset, elset=Set-27, generate
 105,  108,    1
*Nset, nset=Set-28
  28,  29, 123, 124, 125
*Elset, elset=Set-28, generate
 109,  112,    1
*Nset, nset=Set-29
  29,  30, 126, 127, 128
*Elset, elset=Set-29, generate
 113,  116,    1
*Nset, nset=Set-30
  30,  31, 129, 130, 131
*Elset, elset=Set-30, generate
 117,  120,    1
*Nset, nset=Set-31
  31,  32, 132, 133, 134
*Elset, elset=Set-31, generate
 121,  124,    1
*Nset, nset=Set-32
  32,  33, 135, 136, 137
*Elset, elset=Set-32, generate
 125,  128,    1
*Nset, nset=Set-33
  33,  34, 138, 139, 140
*Elset, elset=Set-33, generate
 129,  132,    1
*Nset, nset=Set-34
  34,  35, 141, 142, 143
*Elset, elset=Set-34, generate
 133,  136,    1
*Nset, nset=Set-35
  35,  36, 144, 145, 146
*Elset, elset=Set-35, generate
 137,  140,    1
*Nset, nset=Set-36
  36,  37, 147, 148, 149
*Elset, elset=Set-36, generate
 141,  144,    1
*Nset, nset=Set-37
  37,  38, 150, 151, 152
*Elset, elset=Set-37, generate
 145,  148,    1
*Nset, nset=Set-38
  38,  39, 153, 154, 155
*Elset, elset=Set-38, generate
 149,  152,    1
*Nset, nset=Set-39
  39,  40, 156, 157, 158
*Elset, elset=Set-39, generate
 153,  156,    1
*Nset, nset=Set-40
  40,  41, 159, 160, 161
*Elset, elset=Set-40, generate
 157,  160,    1
*Nset, nset=all, generate
   1,  161,    1
*Elset, elset=all, generate
   1,  160,    1
** Section: S1  Profile: P1
*Beam General Section, elset=Set-1, density=2.019e-13, section=GENERAL
1e+07, 2.83e+10, 0., 1.28e+11, 7.43e+09
0.,0.,-1.
1.,1.
** Section: S2  Profile: P2
*Beam General Section, elset=Set-2, density=1.836e-13, section=GENERAL
1e+07, 2.54e+10, 0., 1e+11, 6.47e+09
0.,0.,-1.
1.,1.
** Section: S3  Profile: P3
*Beam General Section, elset=Set-3, density=1.641e-13, section=GENERAL
1e+07, 2.2e+10, 0., 7.48e+10, 5.6e+09
0.,0.,-1.
1.,1.
** Section: S4  Profile: P4
*Beam General Section, elset=Set-4, density=1.563e-13, section=GENERAL
1e+07, 1.84e+10, 0., 6.45e+10, 4.93e+09
0.,0.,-1.
1.,1.
** Section: S5  Profile: P5
*Beam General Section, elset=Set-5, density=1.492e-13, section=GENERAL
1e+07, 1.3e+10, 0., 6.16e+10, 3.5e+09
0.,0.,-1.
1.,1.
** Section: S6  Profile: P6
*Beam General Section, elset=Set-6, density=1.447e-13, section=GENERAL
1e+07, 9.79e+09, 0., 6.96e+10, 1.87e+09
0.,0.,-1.
1.,1.
** Section: S7  Profile: P7
*Beam General Section, elset=Set-7, density=1.463e-13, section=GENERAL
1e+07, 8.73e+09, 0., 7.4e+10, 1.65e+09
0.,0.,-1.
1.,1.
** Section: S8  Profile: P8
*Beam General Section, elset=Set-8, density=1.536e-13, section=GENERAL
1e+07, 1.16e+10, 0., 9.07e+10, 1.55e+09
0.,0.,-1.
1.,1.
** Section: S9  Profile: P9
*Beam General Section, elset=Set-9, density=1.613e-13, section=GENERAL
1e+07, 1.75e+10, 0., 1.2e+11, 1.25e+09
0.,0.,-1.
1.,1.
** Section: S10  Profile: P10
*Beam General Section, elset=Set-10, density=1.27e-13, section=GENERAL
1e+07, 9.99e+09, 0., 5.66e+10, 1.05e+09
0.,0.,-1.
1.,1.
** Section: S11  Profile: P11
*Beam General Section, elset=Set-11, density=1.274e-13, section=GENERAL
1e+07, 1.05e+10, 0., 6.03e+10, 1.22e+09
0.,0.,-1.
1.,1.
** Section: S12  Profile: P12
*Beam General Section, elset=Set-12, density=1.258e-13, section=GENERAL
1e+07, 1.03e+10, 0., 6.08e+10, 1.07e+09
0.,0.,-1.
1.,1.
** Section: S13  Profile: P13
*Beam General Section, elset=Set-13, density=1.233e-13, section=GENERAL
1e+07, 9.43e+09, 0., 5.93e+10, 9.13e+08
0.,0.,-1.
1.,1.
** Section: S14  Profile: P14
*Beam General Section, elset=Set-14, density=1.202e-13, section=GENERAL
1e+07, 8.22e+09, 0., 5.59e+10, 7.59e+08
0.,0.,-1.
1.,1.
** Section: S15  Profile: P15
*Beam General Section, elset=Set-15, density=1.164e-13, section=GENERAL
1e+07, 6.81e+09, 0., 5.13e+10, 6.18e+08
0.,0.,-1.
1.,1.
** Section: S16  Profile: P16
*Beam General Section, elset=Set-16, density=1.123e-13, section=GENERAL
1e+07, 5.42e+09, 0., 4.62e+10, 4.94e+08
0.,0.,-1.
1.,1.
** Section: S17  Profile: P17
*Beam General Section, elset=Set-17, density=1.081e-13, section=GENERAL
1e+07, 4.21e+09, 0., 4.12e+10, 3.84e+08
0.,0.,-1.
1.,1.
** Section: S18  Profile: P18
*Beam General Section, elset=Set-18, density=6.53e-14, section=GENERAL
1e+07, 2.65e+09, 0., 2.99e+10, 3.18e+08
0.,0.,-1.
1.,1.
** Section: S19  Profile: P19
*Beam General Section, elset=Set-19, density=6.22e-14, section=GENERAL
1e+07, 2.06e+09, 0., 2.64e+10, 2.54e+08
0.,0.,-1.
1.,1.
** Section: S20  Profile: P20
*Beam General Section, elset=Set-20, density=5.94e-14, section=GENERAL
1e+07, 1.64e+09, 0., 2.34e+10, 2.05e+08
0.,0.,-1.
1.,1.
** Section: S21  Profile: P21
*Beam General Section, elset=Set-21, density=5.69e-14, section=GENERAL
1e+07, 1.36e+09, 0., 2.1e+10, 1.69e+08
0.,0.,-1.
1.,1.
** Section: S22  Profile: P22
*Beam General Section, elset=Set-22, density=5.47e-14, section=GENERAL
1e+07, 1.12e+09, 0., 1.87e+10, 1.42e+08
0.,0.,-1.
1.,1.
** Section: S23  Profile: P23
*Beam General Section, elset=Set-23, density=5.26e-14, section=GENERAL
1e+07, 9.52e+08, 0., 1.69e+10, 1.23e+08
0.,0.,-1.
1.,1.
** Section: S24  Profile: P24
*Beam General Section, elset=Set-24, density=5.06e-14, section=GENERAL
1e+07, 7.92e+08, 0., 1.5e+10, 1.09e+08
0.,0.,-1.
1.,1.
** Section: S25  Profile: P25
*Beam General Section, elset=Set-25, density=4.88e-14, section=GENERAL
1e+07, 6.62e+08, 0., 1.34e+10, 9.67e+07
0.,0.,-1.
1.,1.
** Section: S26  Profile: P26
*Beam General Section, elset=Set-26, density=6.53e-14, section=GENERAL
1e+07, 5.54e+08, 0., 2.99e+10, 3.18e+08
0.,0.,-1.
1.,1.
** Section: S27  Profile: P27
*Beam General Section, elset=Set-27, density=4.53e-14, section=GENERAL
1e+07, 4.64e+08, 0., 1.07e+10, 7.67e+07
0.,0.,-1.
1.,1.
** Section: S28  Profile: P28
*Beam General Section, elset=Set-28, density=4.36e-14, section=GENERAL
1e+07, 3.9e+08, 0., 9.55e+09, 6.76e+07
0.,0.,-1.
1.,1.
** Section: S29  Profile: P29
*Beam General Section, elset=Set-29, density=4.2e-14, section=GENERAL
1e+07, 3.32e+08, 0., 8.55e+09, 5.5e+07
0.,0.,-1.
1.,1.
** Section: S30  Profile: P30
*Beam General Section, elset=Set-30, density=2.72e-14, section=GENERAL
1e+07, 2.23e+08, 0., 5.61e+09, 4.81e+07
0.,0.,-1.
1.,1.
** Section: S31  Profile: P31
*Beam General Section, elset=Set-31, density=2.62e-14, section=GENERAL
1e+07, 1.92e+08, 0., 4.99e+09, 4.3e+07
0.,0.,-1.
1.,1.
** Section: S32  Profile: P32
*Beam General Section, elset=Set-32, density=2.53e-14, section=GENERAL
1e+07, 1.65e+08, 0., 4.45e+09, 3.86e+07
0.,0.,-1.
1.,1.
** Section: S33  Profile: P33
*Beam General Section, elset=Set-33, density=2.44e-14, section=GENERAL
1e+07, 1.41e+08, 0., 3.98e+09, 2.83e+07
0.,0.,-1.
1.,1.
** Section: S34  Profile: P34
*Beam General Section, elset=Set-34, density=2.36e-14, section=GENERAL
1e+07, 1.19e+08, 0., 3.62e+09, 3.05e+07
0.,0.,-1.
1.,1.
** Section: S35  Profile: P35
*Beam General Section, elset=Set-35, density=2.28e-14, section=GENERAL
1e+07, 9.63e+07, 0., 3.29e+09, 2.64e+07
0.,0.,-1.
1.,1.
** Section: S36  Profile: P36
*Beam General Section, elset=Set-36, density=2.18e-14, section=GENERAL
1e+07, 7.49e+07, 0., 3e+09, 2.2e+07
0.,0.,-1.
1.,1.
** Section: S37  Profile: P37
*Beam General Section, elset=Set-37, density=2.04e-14, section=GENERAL
1e+07, 5.07e+07, 0., 2.51e+09, 1.72e+07
0.,0.,-1.
1.,1.
** Section: S38  Profile: P38
*Beam General Section, elset=Set-38, density=3.43e-14, section=GENERAL
1e+07, 5.78e+07, 0., 3.67e+09, 2.3e+07
0.,0.,-1.
1.,1.
** Section: S39  Profile: P39
*Beam General Section, elset=Set-39, density=8.7e-15, section=GENERAL
1e+07, 1.12e+07, 0., 8.78e+08, 4.6e+06
0.,0.,-1.
1.,1.
** Section: S40  Profile: P40
*Beam General Section, elset=Set-40, density=7.2e-15, section=GENERAL
1e+07, 4.4e+06, 0., 4.96e+08, 2.7e+06
0.,0.,-1.
1.,1.
*End Part
**
**
** ASSEMBLY
**
*Assembly, name=Assembly
**
*Instance, name=Part-1-1, part=Part-1
-3.1945458545124e-07, -2.25433778311412e-07,           0.
-3.1945458545124e-07, -2.25433778311412e-07,           0., -3.1945458545124e-07, -2.25433778311412e-07, 1.00000001085774, 7.00000016267102
*End Instance
**
*Instance, name=Part-1-2, part=Part-1
3.1945458545124e-07, -2.25433778311412e-07,           0.
3.1945458545124e-07, -2.25433778311412e-07,           0., 0.0610488624920162, 0.998134596164002, -3.7381451048183e-18,         180.
*End Instance
**
*Node
      1,           0.,           0.,           0.
*Node
      2,           0.,          65.,           0.
*Node
      3,           0.,          65.,          10.
*Element, type=CONN3D2
1, 2, 3
*Connector Section, elset=Wire-1-Set-1
Hinge,
"Datum csys-2",
*Element, type=CONN3D2
2, 1, 2
*Connector Section, elset=Wire-4-Set-1
Beam,
"Datum csys-5",
*Nset, nset=JIANCE, instance=Part-1-1, generate
  2,  41,   1
*Nset, nset=JIANCE, instance=Part-1-2, generate
  2,  41,   1
*Nset, nset=Set-5
 3,
*Nset, nset=Set-6
 3,
*Nset, nset=Set-9, instance=Part-1-1, generate
   1,  161,    1
*Elset, elset=Set-9, instance=Part-1-1, generate
   1,  160,    1
*Nset, nset=Set-13, instance=Part-1-1, generate
   1,  161,    1
*Nset, nset=Set-13, instance=Part-1-2, generate
   1,  161,    1
*Elset, elset=Set-13, instance=Part-1-1, generate
   1,  160,    1
*Elset, elset=Set-13, instance=Part-1-2, generate
   1,  160,    1
*Nset, nset=Wire-1-Set-1
 2, 3
*Elset, elset=Wire-1-Set-1
 1,
*Nset, nset=Wire-4-Set-1
 1, 2
*Elset, elset=Wire-4-Set-1
 2,
*Nset, nset=all_two, instance=Part-1-1, generate
   1,  161,    1
*Nset, nset=all_two, instance=Part-1-2, generate
   1,  161,    1
*Elset, elset=all_two, instance=Part-1-1, generate
   1,  160,    1
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*Nset, nset=m_Set-10
 1,
*Nset, nset=s_Set-10, instance=Part-1-1
 1,
*Nset, nset=s_Set-10, instance=Part-1-2
 1,
*Elset, elset=_genbu_END1, internal, instance=Part-1-1
 1,
*Elset, elset=_genbu_END1, internal, instance=Part-1-2
 1,
*Surface, type=ELEMENT, name=genbu
_genbu_END1, END1
*Surface, type=NODE, name=s_Set-10_CNS_, internal
s_Set-10, 1.
*Orientation, name="Datum csys-2"
          0.,           0.,           1.,           0.,           1.,           0.
1, 0.
*Orientation, name="Datum csys-5"
          0.,           1.,           0.,           0.,           0.,           1.
1, 0.
** Constraint: Constraint-1
*Coupling, constraint name=Constraint-1, ref node=m_Set-10, surface=s_Set-10_CNS_
*Kinematic
*End Assembly
**
** BOUNDARY CONDITIONS
**
** Name: BC-1 Type: Symmetry/Antisymmetry/Encastre
*Boundary
Set-5, ENCASTRE
** ----------------------------------------------------------------
**
** STEP: Step-1
**
*Step, name=Step-1, nlgeom=YES, inc=10000
*Static
0.1, 1., 1e-15, 1.
**
** LOADS
**
** Name: Load-1   Type: Rotational body force
*Dload
Set-13, CENTRIF, 10966.3,0.,0.,0.,0.,1.,0.
**
** OUTPUT REQUESTS
**
*Restart, write, frequency=0
**
** FIELD OUTPUT: F-Output-1
**
*Output, field, variable=PRESELECT
**
** HISTORY OUTPUT: H-Output-1
**
*Output, history, variable=PRESELECT
*End Step
** ----------------------------------------------------------------
**
** STEP: Step-2
**
*Step, name=Step-2, nlgeom=NO, perturbation
*Frequency, eigensolver=Lanczos, sim, acoustic coupling=on, normalization=mass
20, , , , ,
**
** OUTPUT REQUESTS
**
*Restart, write, frequency=0
**
** FIELD OUTPUT: F-Output-2
**
*Output, field, variable=PRESELECT
*NODE PRINT, Nset=JIANCE, FREQUENCY=1
U
*NODE FILE
*End Step
